** Test Cube Stress Analysis
** Auto-generated

*HEADING
Cube Stress Analysis

** Generated by CAE Platform

*NODE, FILE=CUBE-NODES, NSET=NALL
1,0.0,0.0,0.0
2,10.0,0.0,0.0
3,10.0,10.0,0.0
4,0.0,10.0,0.0
5,0.0,0.0,10.0
6,10.0,0.0,10.0
7,10.0,10.0,10.0
8,0.0,10.0,10.0

*ELEMENT, TYPE=C3D8, ELSET=EALL
1,1,2,4,3,5,6,8,7

*MATERIAL, NAME=STEEL
*ELASTIC
210000.,0.3
*DENSITY
7.85E-9

*BOUNDARY
NSET,FIXED,1,1,4,5

*DLOAD
OP_NEW,SF,P1,5,6,7,8
3.,1.

*STEP, NLGEOM=NO, INC=10000
*STATIC
1.,1.,1E-07,1E-07

*NODE FILE, NSET=NALL
*EL FILE, ELSET=EALL
*EL PRINT, ELSET=EALL, FREQ=1
*NODE PRINT, NSET=NALL, FREQ=1
*END STEP
*END
